*Heading
** Job name: Gear_Compaction_Sector Model name: Sector
** Generated by: Abaqus/CAE 2023
*Preprint, echo=NO, model=NO, history=NO, contact=NO
**
** PARTS
**
*Part, name=Die_Lower
*Node
      1,   22.4650002,           0.,           0.
      2,   22.4538536,           0.,  0.707566321
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*Element, type=R3D4
 1,   1,  23, 270,  58
 2,  23,   2,  24, 270
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*Element, type=R3D3
317, 193,  21,  12
318, 193,  12,  10
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*Node
    558,           0.,  -8.18999958, 9.47264262e-16
*Nset, nset=Die_Lower-RefPt_, internal
558,
*Elset, elset=_Die_Lower_Cont_SNEG, internal, generate
   1,  468,    1
*Surface, type=ELEMENT, name=Die_Lower_Cont
_Die_Lower_Cont_SNEG, SNEG
*Elset, elset=Die_Lower, generate
   1,  475,    1
*End Part
**
*Part, name=Die_Upper
*Node
      1,   17.5788193,          -9.,   3.09961987
      2,   15.2349758,  -8.18999958,   2.68633723
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*Element, type=R3D4
 1,   1,  13, 104,  30
 2,  13,  14, 105, 104
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*Element, type=R3D3
82,  80, 164,  79
83, 166, 160, 165
84, 209, 198, 194
*Node
    223,           0.,  -8.18999958, 9.47264262e-16
*Nset, nset=Die_Upper-RefPt_, internal
223,
*Elset, elset=_Die_Upper_Cont_SNEG, internal, generate
   1,  176,    1
*Surface, type=ELEMENT, name=Die_Upper_Cont
_Die_Upper_Cont_SNEG, SNEG
*Elset, elset=Die_Upper, generate
   1,  176,    1
*End Part
**
*Part, name=Green_Compact
*Node
      1,   17.6127625,   3.10560513,           0.
      2,   22.1581745,   3.90708399,           0.
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*Element, type=C3D8R
    1,   225,   358,   320,   282,  1040,  1173,  1135,  1097
    2,   236,   235,    44,    43,  1051,  1050,   859,   858
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*Nset, nset=Set-1, generate
     1,  26895,      1
*Elset, elset=Set-1, generate
     1,  23104,      1
*Elset, elset=_Powder_Cont_S6, internal
     5,    11,    27,    36,    38,    40
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*Elset, elset=_Powder_Cont_S3, internal
    14,    29,    31,    87,    92,    93
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*Elset, elset=_Powder_Cont_S4, internal
    10,    67,    94,   109,   110,   111
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*Elset, elset=_Powder_Cont_S1, internal, generate
   1,  722,    1
*Elset, elset=_Powder_Cont_S2, internal, generate
 22383,  23104,      1
*Elset, elset=_Powder_Cont_S5, internal
     2,    12,    27,    36,    44,    69
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*Surface, type=ELEMENT, name=Powder_Cont
_Powder_Cont_S6, S6
_Powder_Cont_S3, S3
_Powder_Cont_S4, S4
_Powder_Cont_S2, S2
_Powder_Cont_S1, S1
_Powder_Cont_S5, S5
** Section: Powder
*Solid Section, elset=Set-1, controls=EC-1, material=Powder
,
*End Part
**
**
** ASSEMBLY
**
*Assembly, name=Assembly
**
*Instance, name=Die_Lower-1, part=Die_Lower
       0.035,           0.,           9.
       0.035,           0.,           9., 1.02743251777865, 0.086826592607882, 9.08682659260788, 90.4352295036925
*End Instance
**
*Instance, name=Green_Compact-1, part=Green_Compact
*End Instance
**
*Instance, name=Die_Upper-1, part=Die_Upper
       0.035,           0.,        -0.19
       0.035,           0.,        -0.19, -0.965000012688052,           0.,        -0.19, 89.9999992730282
*End Instance
**
*Nset, nset=Set-1, instance=Green_Compact-1
     7,     8,     9,    11,    13,    57
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*Elset, elset=Set-1, instance=Green_Compact-1
     6,     8,     9,    37,    41,    44
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*Nset, nset=Set-3, instance=Die_Lower-1
 558,
*Nset, nset=Set-4, instance=Die_Upper-1
 223,
*Nset, nset=Set-5, instance=Die_Upper-1
 223,
*Nset, nset=_PickedSet66, internal, instance=Die_Lower-1
 558,
*Nset, nset=_PickedSet67, internal, instance=Die_Upper-1
 223,
*Elset, elset=_m_Surf-1_S3, internal, instance=Green_Compact-1
     6,     9,    41,    45,    47,    98
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*Elset, elset=_m_Surf-1_S4, internal, instance=Green_Compact-1
     8,    44,    49,   730,   766,   771
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*Elset, elset=_m_Surf-1_S5, internal, instance=Green_Compact-1
    37,    46,    48,    51,    52,   107
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*Elset, elset=_m_Surf-1_S6, internal, instance=Green_Compact-1, generate
    53,  22435,    722
*Surface, type=ELEMENT, name=m_Surf-1
_m_Surf-1_S3, S3
_m_Surf-1_S4, S4
_m_Surf-1_S6, S6
_m_Surf-1_S5, S5
*Elset, elset=_s_Surf-1_S5, internal, instance=Green_Compact-1
    10,    20,    21,    64,    66,    73
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*Elset, elset=_s_Surf-1_S3, internal, instance=Green_Compact-1
    16,    18,    22,    25,    32,    33
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*Elset, elset=_s_Surf-1_S6, internal, instance=Green_Compact-1
    26,   342,   352,   353,   354,   357
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*Elset, elset=_s_Surf-1_S4, internal, instance=Green_Compact-1
    80,   343,   349,   350,   355,   356
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*Surface, type=ELEMENT, name=s_Surf-1
_s_Surf-1_S5, S5
_s_Surf-1_S3, S3
_s_Surf-1_S6, S6
_s_Surf-1_S4, S4
*Rigid Body, ref node=Die_Lower-1.Die_Lower-RefPt_, elset=Die_Lower-1.Die_Lower
*Rigid Body, ref node=Die_Upper-1.Die_Upper-RefPt_, elset=Die_Upper-1.Die_Upper
*Tie, name=Cyc-SYM, cyclic symmetry, adjust=yes
s_Surf-1, m_Surf-1
*Elset, elset=__GenCont_gcs0_10_SPOS, internal, instance=Die_Lower-1, generate
 271,  300,    1
*Surface, type=ELEMENT, name=_GenCont_gcs0_10, internal
__GenCont_gcs0_10_SPOS, SPOS
*Elset, elset=__GenCont_gcs0_12_SPOS, internal, instance=Die_Lower-1, generate
 301,  316,    1
*Surface, type=ELEMENT, name=_GenCont_gcs0_12, internal
__GenCont_gcs0_12_SPOS, SPOS
*Elset, elset=__GenCont_gcs0_23_SNEG, internal, instance=Die_Lower-1, generate
 271,  300,    1
*Surface, type=ELEMENT, name=_GenCont_gcs0_23, internal
__GenCont_gcs0_23_SNEG, SNEG
*Elset, elset=__GenCont_gcs0_25_SNEG, internal, instance=Die_Lower-1, generate
 301,  316,    1
*Surface, type=ELEMENT, name=_GenCont_gcs0_25, internal
__GenCont_gcs0_25_SNEG, SNEG
*Elset, elset=__GenCont_gcs0_28_S6, internal, instance=Green_Compact-1, generate
   340,  22722,    722
*Elset, elset=__GenCont_gcs0_28_S3, internal, instance=Green_Compact-1, generate
   344,  22726,    722
*Elset, elset=__GenCont_gcs0_28_S4, internal, instance=Green_Compact-1, generate
   387,  22769,    722
*Surface, type=ELEMENT, name=_GenCont_gcs0_28, internal
__GenCont_gcs0_28_S6, S6
__GenCont_gcs0_28_S3, S3
__GenCont_gcs0_28_S4, S4
*Elset, elset=__GenCont_gcs0_30_S1, internal, instance=Green_Compact-1, generate
 210,  339,    1
*Surface, type=ELEMENT, name=_GenCont_gcs0_30, internal
__GenCont_gcs0_30_S1, S1
*Elset, elset=__GenCont_gcs0_35_S5, internal, instance=Green_Compact-1, generate
     2,  22384,    722
*Elset, elset=__GenCont_gcs0_35_S6, internal, instance=Green_Compact-1
    76,    96,   798,   818,  1520,  1540
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*Elset, elset=__GenCont_gcs0_35_S4, internal, instance=Green_Compact-1, generate
    94,  22476,    722
*Surface, type=ELEMENT, name=_GenCont_gcs0_35, internal
__GenCont_gcs0_35_S5, S5
__GenCont_gcs0_35_S6, S6
__GenCont_gcs0_35_S4, S4
*Elset, elset=__GenCont_gcs0_40_SPOS, internal, instance=Die_Upper-1, generate
  1,  30,   1
*Surface, type=ELEMENT, name=_GenCont_gcs0_40, internal
__GenCont_gcs0_40_SPOS, SPOS
*Elset, elset=__GenCont_gcs0_43_SNEG, internal, instance=Die_Upper-1, generate
  1,  30,   1
*Surface, type=ELEMENT, name=_GenCont_gcs0_43, internal
__GenCont_gcs0_43_SNEG, SNEG
*End Assembly
**
** ELEMENT CONTROLS
**
*Section Controls, name=EC-1, DISTORTION CONTROL=YES, hourglass=ENHANCED
1., 1., 1.
*Amplitude, name=Amp-1
             0.,              0.,              1.,              1.,             10.,              1.
**
** MATERIALS
**
*Material, name=Powder
*ELASTIC, DEPENDENCIES=1
2000, 0.29, 0.00
2000, 0.29,0, 0.01
**
*USER DEFINED FIELD
**
*Creep, law=USER
*Swelling, law=USER
*DEPVAR
5
**
** INTERACTION PROPERTIES
**
*Surface Interaction, name=IntProp-1
1.,
*Friction, slip tolerance=0.005
 0.1,
*Surface Behavior, pressure-overclosure=HARD
**
** BOUNDARY CONDITIONS
**
** Name: FIX Type: Symmetry/Antisymmetry/Encastre
*Boundary
Set-3, ENCASTRE
** Name: Upper_In-plane Type: Displacement/Rotation
*Boundary
Set-4, 1, 1
Set-4, 2, 2
Set-4, 4, 4
Set-4, 5, 5
Set-4, 6, 6
**
** PREDEFINED FIELDS
**
** Name: Temp   Type: Temperature
*Initial Conditions, type=TEMPERATURE
Green_Compact-1.Set-1, 1000.
*Cyclic Symmetry Model, n=36
0.035, -1.42675e-15, 0.81, 0.035, 4.45771e-16, 8.
**
** INTERACTIONS
**
** Interaction: GenCont
*Contact
*Contact Inclusions, ALL EXTERIOR
*Contact Property Assignment
 ,  , IntProp-1
*Surface Property Assignment, property=GEOMETRIC CORRECTION
_GenCont_gcs0_10, Circumferential, 0.035, -5.18296e-16, 0.405,  0.035, -5.78598e-16, -0.595
_GenCont_gcs0_12, Circumferential, 0.035, -2.46937e-16, 4.905,  0.035, -3.07239e-16, 3.905
_GenCont_gcs0_23, Circumferential, 0.035, -5.18296e-16, 0.405,  0.035, -5.78598e-16, -0.595
_GenCont_gcs0_25, Circumferential, 0.035, -2.46937e-16, 4.905,  0.035, -3.07239e-16, 3.905
_GenCont_gcs0_28, Circumferential, 0., 0., 0.,  0., 0., 1.
_GenCont_gcs0_30, Circumferential, 0.035, -1.12846e-15, 0.405,  0.035, -1.12846e-15, 1.405
_GenCont_gcs0_35, Circumferential, 0., 0., 0.,  0., 0., 1.
_GenCont_gcs0_40, Circumferential, 0.035, -5.26292e-16, 8.405,  0.035, -5.87524e-16, 9.405
_GenCont_gcs0_43, Circumferential, 0.035, -5.26292e-16, 8.405,  0.035, -5.87524e-16, 9.405
** ----------------------------------------------------------------
**
** STEP: Consolidation
**
*Step, name=Consolidation, nlgeom=YES, inc=100000
*Visco, cetol=0.00001, creep=EXPLICIT, stabilize=0.0002, allsdtol=0.05, continue=NO
0.0001, 10., 1e-10, 1.
**
** BOUNDARY CONDITIONS
**
** Name: Upper_Down Type: Displacement/Rotation
*Boundary, amplitude=Amp-1
Set-5, 3, 3, -1.8
**
** OUTPUT REQUESTS
**
*Restart, write, frequency=0
**
** FIELD OUTPUT: F-Output-1
**
*Output, field
*Node Output
CF, RF, U
*Element Output, directions=YES
CE, CEEQ, CEMAG, CESW, LE, PE, PEEQ, PEMAG, S, SDV
*Contact Output
CDISP, CSTRESS
**
** HISTORY OUTPUT: H-Output-2
**
*Output, history
*Node Output, nset=Set-4
RF3, U3
**
** HISTORY OUTPUT: H-Output-1
**
*Output, history, variable=PRESELECT
*End Step
