**
** Indentation creep of powder metal implemented with CREEP subroutine
** Author: Youngbin LIM
** Contact: lyb0684@naver.com
**
*Heading
** Job name: Indentation Model name: Model-1
** Generated by: Abaqus/CAE 2023
*Preprint, echo=NO, model=NO, history=NO, contact=NO
**
** PARTS
**
*Part, name=Indenter
*Node
      1,           0.,         1.25
      2,   0.29422161,   1.26155996
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*Element, type=R2D2
 1,  1,  2
 2,  2,  3
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*Node
     22,           0.,           5.,           0.
*Nset, nset=Indenter-RefPt_, internal
22,
*Elset, elset=Indenter, generate
  1,  20,   1
*End Part
**
*Part, name=Powder
*Node
      1,        2.875,       -1.875
      2,        2.875,           0.
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*Element, type=CPE4R
  1,   1,   8, 159,  99
  2,   8,   9, 160, 159
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*Element, type=CPE3
552,  901,  873,  880
553, 1201,  934,  872
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*Nset, nset=Set-1, generate
    1,  1237,     1
*Elset, elset=Set-1, generate
    1,  1188,     1
** Section: Powder
*Solid Section, elset=Set-1, material=Powder
,
*End Part
**
**
** ASSEMBLY
**
*Assembly, name=Assembly
**
*Instance, name=Indenter-1, part=Indenter
          0.,        -1.25,           0.
*End Instance
**
*Instance, name=Powder-1, part=Powder
*End Instance
**
*Nset, nset=Set-1, instance=Powder-1
   5,   6,   7, 111, 112, 113
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*Elset, elset=Set-1, instance=Powder-1
  617,  630,  631,  638,  967, 1019
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*Nset, nset=Set-2, instance=Indenter-1
 22,
*Nset, nset=Set-3, instance=Powder-1, generate
    1,  1237,     1
*Elset, elset=Set-3, instance=Powder-1, generate
    1,  1188,     1
*Nset, nset=Set-4, instance=Powder-1
   3,   4,   5,  54,  55,  56
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*Elset, elset=Set-4, instance=Powder-1
 533, 534, 535, 536, 537, 538
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*Rigid Body, ref node=Indenter-1.Indenter-RefPt_, elset=Indenter-1.Indenter
*Elset, elset=__Int-1_gcs0_1_SPOS, internal, instance=Indenter-1, generate
  1,  20,   1
*Surface, type=ELEMENT, name=_Int-1_gcs0_1, internal
__Int-1_gcs0_1_SPOS, SPOS
*Elset, elset=__Int-1_gcs0_2_SNEG, internal, instance=Indenter-1, generate
  1,  20,   1
*Surface, type=ELEMENT, name=_Int-1_gcs0_2, internal
__Int-1_gcs0_2_SNEG, SNEG
*End Assembly
*Amplitude, name=Ind_Amp
             0.,              0.,             3.,              1.,           3000.,              1.
**
** MATERIALS
**
*Material, name=Powder
**
*Elastic, dependencies=1
2000., 0.29, ,   0.
2000., 0.29, ,  0.1
**
*USER DEFINED FIELD
**
*Creep, law=USER
*Swelling, law=USER
**
*DEPVAR
5
**
** INTERACTION PROPERTIES
**
*Surface Interaction, name=IntProp-1
1.,
*Friction, slip tolerance=0.005
 0.1,
*Surface Behavior, pressure-overclosure=HARD
**
** BOUNDARY CONDITIONS
**
** Name: FIX Type: Displacement/Rotation
*Boundary
Set-1, 1, 1
Set-1, 2, 2
** Name: Indenter Type: Displacement/Rotation
*Boundary
Set-2, 1, 1
Set-2, 2, 2
Set-2, 6, 6
** Name: Sym Type: Displacement/Rotation
*Boundary
Set-4, 1, 1
**
** PREDEFINED FIELDS
**
** Name: Temp   Type: Temperature
*Initial Conditions, type=TEMPERATURE
Set-3, 1198.15
**
** INTERACTIONS
**
** Interaction: Int-1
*Contact
*Contact Inclusions, ALL EXTERIOR
*Contact Property Assignment
 ,  , IntProp-1
*Surface Property Assignment, property=GEOMETRIC CORRECTION
_Int-1_gcs0_1, Circumferential, 0., 3.75
_Int-1_gcs0_2, Circumferential, 0., 3.75
** ----------------------------------------------------------------
**
** STEP: Indentation
**
*Step, name=Indentation, nlgeom=YES, inc=10000
*Visco, cetol=0.0001, creep=EXPLICIT, stabilize=0.0002, allsdtol=0.05, continue=NO
0.0001, 3000., 1e-09, 100.
**
** BOUNDARY CONDITIONS
**
** Name: Indenter Type: Displacement/Rotation
*Boundary, amplitude=Ind_Amp
Set-2, 1, 1
Set-2, 2, 2, -1.
Set-2, 6, 6
**
** OUTPUT REQUESTS
**
*Restart, write, frequency=0
**
** FIELD OUTPUT: F-Output-1
**
*Output, field
*Node Output
CF, RF, U
*Element Output, directions=YES
CE, CEEQ, CEMAG, CESW, LE, S, SDV
*Contact Output
CDISP, CSTRESS
**
** HISTORY OUTPUT: H-Output-1
**
*Output, history, variable=PRESELECT
*End Step
